// SBML level 2 version 4

model michaelis_menten()

  // Compartments:
  compartment main;

  // Species:
  species E1 in main = 1e-6/main;
  species S in main = 0.001/main;
  species C in main = 0;
  species P in main = 0;
  species E2 in main = 1.5e-6/main;

  // Parameters:
  mega = 1000000;
  b1 = 1000;
  k1 = 1000;

  // Assignment rules:
  f1 := 1.5*mega;
  f2 := mega*E2*S;
  b2 := 1e3*C;
  k2 := 1e3*C;
  fd := f1 + f2;

  // Reactions:
  E1_S_C_f1_1_5_mega: E1 + S -> C; f1*E1*S; E1_S_C_f1_1_5_mega is "E1+S -> C; f1= 1.5*mega";
  C_E1_S_b1_1e3: C -> E1 + S; b1*C; C_E1_S_b1_1e3 is "C -> E1+S ; b1= 1e3";
  C_P_E1_k1_1e3: C -> P + E1; k1*C; C_P_E1_k1_1e3 is "C -> P + E1; k1= 1e3";
  E2_S_C_f2_mega_E2_S: E2 + S -> C; f2; E2_S_C_f2_mega_E2_S is "E2+S => C; f2= mega*E2*S";
  C_E2_S_b2_1e3_C: C -> E2 + S; b2; C_E2_S_b2_1e3_C is "C => E2+S ; b2= 1e3*C";
  C_P_E2_k2_1e3_C: C -> P + E2; k2; C_P_E2_k2_1e3_C is "C => P + E2; k2= 1e3*C";
  P_null_fd_f1_f2: P -> ; fd*P; P_null_fd_f1_f2 is "P -> null; fd=f1+f2";
end
